### CCM: BD run with dipoalr active force on two A-A bonds
###################################################################################
### Basic System Setting
units lj
atom_style bond
special_bonds fene
dimension 3
boundary s s s

### Read configuration file
read_data init_config_files/chr5/den_1/init_config_r${r}

neighbor 2.0 bin
neigh_modify every 1 delay 0 one 100000 page 1000000 check yes
group euchromatin type 1
group heterochr type 2
group ON id 3223:3225 ### two A-A bonds (active)
group OFF id 1:3222 3226:4000  ### all other loci (inactive)

pair_style  lj/cut 3.0
pair_coeff  1 1 2.4 1.0 3.0
pair_coeff  1 2 1.96 1.0 3.0
pair_coeff  2 2 2.4 1.0 3.0
pair_modify  shift yes

bond_style hybrid harmonic fene
bond_coeff 1 fene 30.0 1.5 1.0 1.0
bond_coeff 2 harmonic 300.0 1.13

### get integer seeds for the random forces in Brownian dynamics
variable seed1 equal ceil(${r}*100)
variable seed2 equal ceil(${r}*100+1)

### Fix Command
fix ensemble_1 ON bd/active/polymer 1.00 0.00007939 ${seed1} 80 1
fix ensemble_2 OFF bd 1.00 0.00007939 ${seed2}
fix cm_fix all recenter 0.0 0.0 0.0 units box

### Compute & Thermo Command
compute Rg all gyration
thermo_style custom step press pe c_Rg
timestep 1.26

### Relaxation for BD run
thermo	 10000
run      1000000
reset_timestep 0


### Dump for dynamical statistics
dump     dump_short all xyz 5 traj_short_r${r}.xyz
dump     dump_mid all xyz 2000 traj_mid_r${r}.xyz
dump     dump_long all xyz 10000 traj_long_r${r}.xyz
dump     dump_longer all xyz 50000 traj_longer_r${r}.xyz

### Run for short-time scale
thermo	 1000
run      40000
undump	 dump_short

### Run for mid-time scale
thermo	 100000
run      19960000
undump	 dump_mid

### Run for long-time scale (pt. 1)
thermo	 10000000
restart  20000000 long_r${r}.restart
run	 80000000
undump   dump_long

### Run for long-time regime (pt. 2)
run     100000000
